<Lems>

        <!-- Example showing Spike Timing Dependent Plasticity synapse -->

  <!---       NOTE: EXAMPLE NOT YET WORKING!!!!   -->

        <!-- This is a file which can be read and executed by the LEMS Interpreter.
             It imports the LEMS definitions of the core NeuroML 2 Components, creates
             a model in "pure" NeuroML 2 and contains some LEMS elements for running
             a simulation -->

        <DefaultRun component="sim1"/>

        <Include file="NeuroML2CoreTypes/NeuroMLCoreDimensions.xml"/>
        <Include file="NeuroML2CoreTypes/Cells.xml"/>
        <Include file="NeuroML2CoreTypes/Networks.xml"/>
        <Include file="NeuroML2CoreTypes/Simulation.xml"/>

    <!-- NeuroML 2 elements... -->

        <iafCell id="iaf1" leakReversal="-50mV" thresh="-55mV" reset="-70mV" C="1e-5uF" leakConductance="5e-7mS"/>
        <iafCell id="iaf2" leakReversal="-50mV" thresh="-55mV" reset="-70mV" C="1e-5uF" leakConductance="5.2e-7mS"/>

  <!---       NOTE: EXAMPLE NOT YET WORKING!!!!   -->

        <stdpSynapse id="stdpSyn" gbase="0.1nS" erev="0mV" tauRise="0.1ms" tauDecay="2ms">
        </stdpSynapse>

        <network id="net2">
            <population id="src" component="iaf1" size="1"/>
            <population id="tgt" component="iaf2" size="1"/>
            <synapticConnection from="src[0]" to="tgt[0]" synapse="stdpSyn"/>
        </network>

   <!-- End of NeuroML 2 elements... -->

        <Simulation id="sim1" length="300ms" step="0.01ms" target="net2">
                <Display id="d1" title="NOT YET WORKING!! Ex11: Cells with STDP synapse: voltage" timeScale="1ms">
                        <Line id="l0" quantity="src[0]/v" scale="1mV" color="#000000" save="examples/testResults/iaf11_v0.dat"/>
                        <Line id="l1" quantity="tgt[0]/v" scale="1mV" color="#0000FF" save="examples/testResults/iaf11_v1.dat"/>
                </Display>

                <Display id="d2" title="NOT YET WORKING!! Ex11: Cells with STDP synapse: synaptic conductances" timeScale="1ms">
                        <Line id ="l1" quantity="tgt[0]/stdpSyn/g" scale="1nS"  color="#000000" save="examples/testResults/ex11_syn0.dat"/>
                </Display>

                <!--<Display id="d4" title="Ex7: Cells with STP synapse: scaling variables" timeScale="1ms">
                        <Line id ="l1" quantity="pasPop[1]/stpSynDep/R" scale="1"  color="#00ffff" save="ex7_R1.dat"/>
                        <Line id ="l2" quantity="pasPop[1]/stpSynDep/U" scale="1"  color="#0000ff" save="ex7_U1.dat"/>
                        <Line id ="l3" quantity="pasPop[2]/stpSynFac/R" scale="1"  color="#ffffff" save="ex7_R2.dat"/>
                        <Line id ="l4" quantity="pasPop[2]/stpSynFac/U" scale="1"  color="#0055ff" save="ex7_U2.dat"/>
                </Display>-->
        </Simulation>

</Lems>
