<Lems>

        <!-- Example with FitzHugh-Nagumo model -->

        <!-- This is a file which can be read and executed by the LEMS Interpreter.
             It imports the LEMS definitions of the core NeuroML 2 Components, creates
             a model in "pure" NeuroML 2 and contains some LEMS elements for running
             a simulation -->

<!-- Specify which component to run -->
<DefaultRun component="sim1"/>

<!-- Include core NeuroML2 ComponentType definitions -->
<Include file="NeuroML2CoreTypes/Cells.xml"/>
<Include file="NeuroML2CoreTypes/Networks.xml"/>
<Include file="NeuroML2CoreTypes/Simulation.xml"/>

<!-- Main NeuroML2 content. Based on http://www.scholarpedia.org/article/FitzHugh-Nagumo_model -->

<fitzHughNagumoCell id="fn1" I="0.8"/>

<network id="net1">
    <population id="fnPop1" component="fn1" size="1"/>
</network>

<!-- End of NeuroML2 content -->

<Simulation id="sim1" length="200s" step="0.05s" target="net1" report="examples/simReport.txt">

    <Display id="d1" title="Ex9: FitzHugh-Nagumo cell model in LEMS" timeScale="1s">
        <Line id ="fn1" quantity="fnPop1[0]/V" scale="1"  color="#ee40FF" save="examples/testResults/fn2_v.dat"/>
        <Line id ="fn2" quantity="fnPop1[0]/W" scale="1"  color="#BBA0AA" save="examples/testResults/fn_w.dat"/>
    </Display>

</Simulation>

</Lems>
