<?xml version="1.0" encoding="UTF-8"?>

<neuroml xmlns="http://www.neuroml.org/schema/neuroml2"
    xmlns:xsi="http://www.w3.org/2001/XMLSchema-instance"
    xsi:schemaLocation="http://www.neuroml.org/schema/neuroml2  ../Schemas/NeuroML2/NeuroML_v2alpha.xsd"
    id="NML2_SimpleIonChannel">

    <!-- Example of a simple Na+ ion channel in NeuroML 2 -->

        <ionChannel id="na" type="ionChannelHH" conductance="10pS" species="na">

           <gateHH id="m" instances="3">
                <forwardRate type="HHExpLinearRate" rate="1per_ms" midpoint="-40mV" scale="10mV"/>
                <reverseRate type="HHExpRate" rate="4per_ms" midpoint="-65mV" scale="-18mV"/>
           </gateHH>

           <gateHH id="h" instances="1">
               <forwardRate type="HHExpRate" rate="0.07per_ms" midpoint="-65mV" scale="-20mV"/>
               <reverseRate type="HHSigmoidRate" rate="1per_ms" midpoint="-35mV" scale="10mV"/>
           </gateHH>

        </ionChannel>

</neuroml>
