<Lems>

    <DefaultRun component="sim1"/>

    <!-- Include core NeuroML2 ComponentType definitions -->

    <Include file="NeuroML2CoreTypes/Cells.xml"/>
    <!-- The above file includes NeuroMLCoreDimensions.xml, Channels.xml, Synapses.xml and Inputs.xml-->
    <Include file="NeuroML2CoreTypes/Networks.xml"/>
    <Include file="NeuroML2CoreTypes/Simulation.xml"/>

    <iafTauCell id="iafTau0" leakReversal="-50mV" thresh="-55mV" reset="-70mV" tau="30ms"/>

    <iafCell id="iaf0" C="1nF" leakReversal="-60mV" thresh="-50mV" reset="-70mV" leakConductance="50nS"/>

    <pulseGenerator id="pulseGenA" delay="100ms" duration="200ms" amplitude="1nA"/>

    <network id="net1">
        <population id="iafPop" component="iaf0" size="1"/>
        <population id="iafTauPop" component="iafTau0" size="1"/>
        <explicitInput target="iafPop[0]" input="pulseGenA"/>
    </network>

    <Simulation id="sim1" length="500ms" step="0.01ms" target="net1">

        <Display id="d0" title="Ex0..." timeScale="1ms">
            <Line id ="iaf1" quantity="iafPop[0]/v" scale="1mV"  color="#000000" save="iaf_v.dat"/>
            <Line id ="iaf1" quantity="iafTauPop[0]/v" scale="1mV"  color="#00dd00" save="iaftau_v.dat"/>
        </Display>

    </Simulation>

</Lems>
